i := 1 .. 100
v[0] := 0
z[0] := 0
g[0] := 0
φ[0] := 0
σ := 1
φ[i] := rnd(2*π)
v1[0] := 0
g1[0] := 0
φ1[0] := 0
φ1[i] := rnd(2*π)
z1(σ, i) :=
    z1 ← 2*rnd(σ) - σ if i == 0
    z1 ← rnorm(1, 0, σ)[0] if i == 1
    z1 ← 0 otherwise
z2[i] := z1(σ, 0)
v1[i] := z2[i]*sin(φ1[i]) + v1[i - 1]
g1[i] := z2[i]*cos(φ1[i]) + g1[i - 1]
z[i] := z1(σ, 0)
x1_1[0] := 0
y1[0] := 0
v[i] := z[i]*sin(φ[i])
x1_1[i] := x1_1[i - 1] + v1[i]
g[i] := z[i]*cos(φ[i])
x[0] := 0
y[0] := 0
y1[i] := y1[i - 1] + g1[i]
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x[i] := x[i - 1] + v[i]
y[i] := y[i - 1] + g[i]
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χ := (x1_1[last(x)] - x1_1[0])^2 + (y1[last(y)] - y1[0])^2 = 1687.6
p[i] := [x[i], y[i]]
dist[0] := 0
χ := (x[last(x)] - x[0])^2 + (y[last(y)] - y[0])^2 = 3.0209
dist[i] := sqrt((x1_1[i] - x1_1[0])^2 + (y1[i] - y1[0])^2)
p[i] := [x[i], y[i]]
pc1 := max(dist) = 43.3546
dist[0] := 0
dist[i] := sqrt((x[i] - x[0])^2 + (y[i] - y[0])^2)
distparam2(k, i, σ) :=
    distlast ← 0
    distmax ← 0
    distlength ← 0
    for j ∈ 1 .. k
        v[0] ← g[0] ← (z[0] ← (x[0] ← (y[0] ← (φ[0] ← 0))))
        for l ∈ 1 .. i
            φ[l] ← rnd(2*π)
            z[l] ← z1(σ, 0)
            v[l] ← z[l]*sin(φ[l]) + v[l - 1]
            g[l] ← z[l]*cos(φ[l]) + g[l - 1]
            x[l] ← x[l - 1] + v[l]
            y[l] ← y[l - 1] + g[l]
            dist[l] ← (x[l] - x[0])^2 + (y[l] - y[0])^2
            distlength ← distlength + (x[l] - x[l - 1])^2 + (y[l] - y[l - 1])^2
        distlast ← distlast + (x[last(x)] - x[0])^2 + (y[last(y)] - y[0])^2
        distmax ← distmax + max(dist)
    distmax ← distmax/k
    distlast ← distlast/k
    distlength ← distlength/k
    distparam2 ← [distlength, distmax, distlast]
pc := max(dist) = 3.19964
distparam(k, i, σ) :=
    distlast ← 0
    distmax ← 0
    distlength ← 0
    for j ∈ 1 .. k
        v[0] ← (g[0] ← (z[0] ← (x[0] ← (y[0] ← (φ[0] ← 0)))))
        for l ∈ 1 .. i
            φ[l] ← rnd(2*π)
            z[l] ← z1(σ, 0)
            v[l] ← z[l]*sin(φ[l])
            g[l] ← z[l]*cos(φ[l])
            x[l] ← x[l - 1] + v[l]
            y[l] ← y[l - 1] + g[l]
            dist[l] ← (x[l] - x[0])^2 + (y[l] - y[0])^2
            distlength ← distlength + (x[l] - x[l - 1])^2 + (y[l] - y[l - 1])^2
        distlast ← distlast + (x[last(x)] - x[0])^2 + (y[last(y)] - y[0])^2
        distmax ← distmax + max(dist)
    distmax ← distmax/k
    distlast ← distlast/k
    distlength ← distlength/k
    distparam ← [distlength, distmax, distlast]
i := 1 .. 99
distparam(1000, 100, 1) = [33.1764, 47.988, 33.461]
func2[i] := distparam2(1000, i, 1)
func[i] := distparam(1000, i, 1)
длина3(i) := func2[i][:, 0]
длина1(i) := func[i][:, 0]
max3(i) := func2[i][:, 1]
max1(i) := func[i][:, 1]
last3(i) := func2[i][:, 2]
last1(i) := func[i][:, 2]
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param(j) :=
    σ ← 0
    k ← 1/j
    for i ∈ 0 .. j
        func1[i] ← distparam(1000, 100, σ)
        σ ← σ + k
    param ← func1
param2(j) :=
    σ ← 0
    k ← 1/j
    for i ∈ 1 .. (j - 1)
        σ ← σ + k
        func3[i] ← distparam2(1000, 100, σ)
    param2 ← func3
func3 := param2(100)
z := 0 .. 100
func1 := param(100)
x1[i] := i
длина2(i) := func1[i][:, 0]
длина4(i) := func3[i][:, 0]
max2(i) := func1[i][:, 1]
max4(i) := func3[i][:, 1]
last2(i) := func1[i][:, 2]
last4(i) := func3[i][:, 2]
# график от σ где i в 100 раз больше σ, то есть σ от 0 до 1 с шагом 0.01
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# график от σ где i в 100 раз больше σ, то есть σ от 0 до 1 с шагом 0.01
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z1_1[i] := длина3(i)[0]
z3[i] := last3(i)[0]
f1[i] := длина1(i)[0]
f2[i] := max1(i)[0]
f3[i] := last1(i)[0]
z2_2[i] := max3(i)[0]
l1 := expfit(x1, z1_1) = [300.211; 0.019343; -356.762]
l2 := expfit(x1, z2_2) = [4304.36; 0.0335803; -7313.24]
l3 := expfit(x1, z3) = [4289.15; 0.0335847; -7287.78]
k1 := line(x1, f1) = [-0.0129946; 0.333605]
k2 := line(x1, f2) = [-0.687146; 0.484667]
k3 := line(x1, f3) = [0.0539253; 0.331325]
r1(z) := k1[1]*z + k1[0] → 0.333604711197*z - 0.0129946320921
r4(z) := l1[0]*e^(l1[1]*z) + l1[2] → 300.210573695*e^(0.0193430005362*z) - 356.761793242
r2(z) := k2[1]*z + k2[0] → 0.484667190527*z - 0.687145759475
r5(z) := l2[0]*e^(l1[1]*z) + l2[2] → 4304.35897453*e^(0.0193430005362*z) - 7313.24376619
r3(z) := k3[1]*z + k3[0] → 0.331325485755*z + 0.053925316152
r6(z) := l3[0]*e^(l1[1]*z) + l3[2] → 4289.15420287*e^(0.0193430005362*z) - 7287.77886129
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z := 1 .. 100
t := 1 .. 99
x3[0] := 1
x3[t] := t + 1
j := 0 .. 100
x2[j] := j
n1[i] := длина4(i)[0]
n2[i] := max4(i)[0]
n3[i] := last4(i)[0]
y1[j] := длина2(j)[0]
y2[j] := max2(j)[0]
y3[j] := last2(j)[0]
l1 := expfit(x3, n1) = [294.117; 0.0193995; -359.126]
l2 := expfit(x3, n2) = [20126.6; 0.0192283; -24567.7]
l3 := expfit(x3, n3) = [20074.5; 0.0192248; -24504.7]
k1 := expfit(x2, y1) = [5.88552; 0.0194805; -7.05543]
k2 := expfit(x2, y2) = [8.49684; 0.0194892; -10.1773]
k3 := expfit(x2, y3) = [5.94986; 0.0193624; -7.10736]
r4(z) := l1[0]*e^(l1[1]*z) + l1[2] → 294.117058983*e^(0.0193995056883*z) - 359.125878376
r1(z) := k1[0]*e^(k1[1]*z) + k1[2] → 5.8855213874*e^(0.0194805311193*z) - 7.05543395441
r5(z) := l2[0]*e^(l2[1]*z) + l2[2] → 20126.5619407*e^(0.0192283081922*z) - 24567.6807005
r2(z) := k2[0]*e^(k2[1]*z) + k2[2] → 8.49683607341*e^(0.0194891648814*z) - 10.1772524759
r6(z) := l3[0]*e^(l3[1]*z) + l3[2] → 20074.5194663*e^(0.0192248045606*z) - 24504.672352
r3(z) := k3[0]*e^(k3[1]*z) + k3[2] → 5.94986432627*e^(0.0193624348987*z) - 7.10735986918
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